LineLength := 600 m
LineSpeed := 5 m/s
Cycles := 10
TotalTime := Cycles*LineLength/LineSpeed = 20 min
PowerNeeded := 2 kW
BatteryVoltage := 72 V
MotorCurrent := 85 A
MotorCurrentPeak := 300 A
BatteryCapacity := PowerNeeded*TotalTime/BatteryVoltage = 9.25926 A*hr
MotorPower := BatteryVoltage*MotorCurrent = 6.12 kW
MotorPowerPeak := BatteryVoltage*MotorCurrentPeak = 21.6 kW
