W_Hull := 600 mm
H_Hull := 900 mm
L_Hull := 6 m
ρ := 998 kg/m^3
m_Cat := 1900 kg
h_WL := m_Cat/(2*W_Hull*L_Hull*ρ) = 264.418 mm
B_clearance := H_Hull - h_WL = 635.582 mm
L_Hull*6.25% = 375 mm
C_d := 0.3
A := h_WL*W_Hull = 0.158651 m^2
v := 12 knot
D := 1/2*ρ*v^2*A*C_d = 92.2959 kgf
P := D*2*v = 14.9861 hp
