Windows
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b := 1000 mm
h := 2200 mm
AR := h/b = 2.2
β := 0.65
Kw := 225
tw_min := b/Kw*sqrt(β*p)  # error: This variable is undefined. Check that the label is set correctly.  # G201
t_outer := 6 mm
t_inner := 6 mm
tw := sqrt(t_outer^2 + t_inner^2) = 8.48528 mm
