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h := 600 mm
r := 200 mm
A := 2*r*h = 0.24 m^2
n := 3
c := 100 mm
σ := n*c/(2*π*r) = 0.238732
β := h/(2*r) = 1.5
v_∞ := 6 m/s
RPM := 8000 rpm
ω := RPM*π*rad/30 = 87.7298 1/s
v_t := ω*r = 17.546 m/s
λ := v_t/v_∞ = 2.92433
AR := h/(2*r) = 1.5
θ := 0, 1 deg .. 360 deg
v(θ) := v_∞*sqrt(1 + 2*λ*cos(θ) + λ^2)
α(θ) := atan(sin(θ)/(cos(θ) + λ))
C_L(α) := 2*π*α
C_D := 0.02
C_T(α) := C_L*sin(α) - C_D*cos(α)
# [chart]
    X[1] := θ/deg
    Y[1] := v(θ)/(m/s)
    X[2] := θ/deg
    Y[2] := α(θ)/deg
θ := 0, 1 deg .. 5 deg
C_T(α(2*deg)) =  # error: This value must be a scalar or a matrix.
# [chart]
    X[1] := θ/deg  # error: Plotting failed. Replace complex values and NaNs for this trace by real numbers.
    Y[1] := C_T(α(θ))  # error: Plotting failed. Replace complex values and NaNs for this trace by real numbers.
